*HEADING
Robot walking model
*NODE, NSET=robot_nodes
1, 1.000000, 0.000000, 0.000000
2, 0.750000, 0.000000, -0.250000
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*NODE, NSET=ground_ref
645, 0., -.76, 0.
*NODE, NSET=RIGID_NODES
646, -10,-1.1,10
647, 10, -1.1, 10
648, 10, -1.1, -10
649, -10, -1.1, -10
*ELEMENT, TYPE=B31, ELSET=BEAM
1, 1, 2
2, 2, 3
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**ELEMENT, TYPE=CONN3D2, ELSET=ACTUATORS
**769,378,538
**770,54,218
*BEAM SECTION, SECTION=RECTANGULAR, ELSET=BEAM, MATERIAL=STEEL
 1., 2.
*ELEMENT, TYPE=MASS, ELSET=REF_MASS
769,645
*MASS, ELSET=REF_MASS
1000.,
*ELEMENT, TYPE=R3D4, ELSET=GROUND
770, 646,647,648,649
** *CONNECTOR SECTION, ELSET=ACTUATORS
** axial
 *MATERIAL, NAME=STEEL
*ELASTIC
 3.E6,.3
 *DENSITY
 .0005
**BOUNDARY
** 478, PINNED
** 156, 2,2,0.
** 438, 2,2,0.
** 398, 2,2,0.
** 358, 2,2,0.
** 33, 2,2,0.
** 74, 2,2,0.
** 115, 2,2,0.
*BOUNDARY
RIGID_NODES, 1,6,0.
ground_ref,1,6,0.
*AMPLITUDE,TIME=TOTAL TIME,VALUE=RELATIVE,NAME=MIN1
 0.,0.,1.0,1.0,2.,0.,5.,0.
*AMPLITUDE,TIME=TOTAL TIME,VALUE=RELATIVE,NAME=MIN2
 0.,0.,2.0,0.0,3.,1.,4.,0.
 5.,0.
**
*NSET, NSET=FEET_NODES
478, 156, 438, 398, 358, 33, 74, 115
*SURFACE,TYPE=NODE, NAME=FEET
FEET_NODES
*SURFACE, TYPE=ELEMENT, NAME=GROUND
GROUND,SPOS
*RIGID BODY, ELSET=GROUND, REFNODE=ground_ref
*SURFACE INTERACTION, NAME=INT1
*FRICTION
 0.15,
*SURFACE BEHAVIOR,PENALTY
*CONTACT PAIR,INTERACTION=INT1
FEET,GROUND
**
**Step, name=frequency
**frequency
**Frequency
**50
**End Step
*STEP,INC=10000,NLGEOM
*DYNAMIC
1.0E-4,5.,1.0E-8
*DLOAD
BEAM,GRAV,9810.,0.,-1.,0.
**CLOAD,AMPLITUDE=DYN
**538,2,20.
**218,2,-20.
**BOUNDARY, TYPE=VELOCITY, AMPLITUDE=velocity
*BOUNDARY, AMPLITUDE=MIN1
 538, 1, 1, 1.1
 *BOUNDARY, AMPLITUDE=MIN2
 218,3,3,3.1
*END STEP
